*Heading
** Job name: T10mmEx Model name: Model-1
** Generated by: Abaqus/CAE Learning Edition 2023
*Preprint, echo=NO, model=NO, history=NO, contact=NO
**
** PARTS
**
*Part, name=DOG-BONE
*Node
      1,          6.5,         -80.,           3.
      2,         -6.5,         -80.,           3.
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*Element, type=C3D8R
 1,   8,  59, 267,  67,   1,  41, 257,  54
 2,  59,  58, 268, 267,  41,  42, 258, 257
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*Nset, nset=Set-2, generate
   1,  686,    1
*Elset, elset=Set-2, generate
   1,  288,    1
** Section: Section-1
*Solid Section, elset=Set-2, material=STEEL
,
*End Part
**
**
** ASSEMBLY
**
*Assembly, name=Assembly
**
*Instance, name=DOG-BONE-1, part=DOG-BONE
*End Instance
**
*Nset, nset=Set-8, instance=DOG-BONE-1
   3,   4,   6,   7,  31,  32
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*Elset, elset=Set-8, instance=DOG-BONE-1, generate
 223,  288,    1
*Nset, nset=Set-9, instance=DOG-BONE-1
  17,  18,  19,  20,  21,  22
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*Surface, type=ELEMENT, name=s_Surf-1
_s_Surf-1_S4, S4
_s_Surf-1_S6, S6
_s_Surf-1_S2, S2
_s_Surf-1_S3, S3
_s_Surf-1_S1, S1
*End Assembly
*Amplitude, name=Amp-1
             0.,              0.,              1.,              1.
*Amplitude, name=Amp-2
             0.,              0.,            0.001,              1.
**
** MATERIALS
**
*Material, name=STEEL
*Density
 7.8e-09,
*Elastic
210000., 0.3
*Plastic
 755.,   0.
 809., 0.01
 829., 0.02
 842.,  0.1
 895., 0.15
 922.,  0.4
 953.,   1.
1100.,   4.
*Damage Initiation, criterion=DUCTILE
  1.,  0., 30.
 0.5, 0.4, 30.
**
** BOUNDARY CONDITIONS
**
** Name: BC-1 Type: Symmetry/Antisymmetry/Encastre
*Boundary
Set-8, ENCASTRE
** ----------------------------------------------------------------
**
** STEP: Step-1
**
*Step, name=Step-1, nlgeom=YES
*Dynamic, Explicit, direct user control
1.0e-07, 0.001
*Bulk Viscosity
0.06, 1.2
**
** BOUNDARY CONDITIONS
**
** Name: BC-2 Type: Displacement/Rotation
*Boundary, amplitude=Amp-2
Set-9, 1, 1
Set-9, 2, 2, 10.
Set-9, 3, 3
Set-9, 4, 4
Set-9, 5, 5
Set-9, 6, 6
**
** OUTPUT REQUESTS
**
*Restart, write, number interval=1, time marks=NO
**
** FIELD OUTPUT: F-Output-1
**
*Output, field, variable=PRESELECT
**
** HISTORY OUTPUT: H-Output-1
**
*Output, history, variable=PRESELECT
*End Step
