*Heading
** Job name: bullet-impact Model name: Model-1
** Generated by: Abaqus/CAE Learning Edition 2023
** Example for HAKAI-v0.0.0
*Preprint, echo=NO, model=NO, history=NO, contact=NO
**
** PARTS
**
*Part, name=bullet
*Node
      1, 0.00404508505, 0.0199999996, 0.00293892622
      2, 0.00154508499, 0.0199999996, 0.00475528277
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*Element, type=C3D8R
 1, 32, 27, 17, 18, 16, 11,  1,  2
 2, 19, 20, 32, 18,  3,  4, 16,  2
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*Node
     97,           0., 0.0350000001, 1.53080849e-19
*Nset, nset=bullet-RefPt_, internal
97,
*Nset, nset=Set-4, generate
  1,  96,   1
*Elset, elset=Set-4, generate
  1,  50,   1
** Section: Lead
*Solid Section, elset=Set-4, material=lead
,
*End Part
**
*Part, name=plate
*Node
      1, 0.0299999993, -0.0500000007, 0.00200000009
      2, 0.0299999993, 0.0500000007, 0.00200000009
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*Element, type=C3D8R
  1, 137, 161, 187, 164, 296, 320, 346, 323
  2, 141, 116,  45, 120, 300, 275, 110, 279
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*Nset, nset=Set-1, generate
   1,  514,    1
*Elset, elset=Set-1, generate
   1,  238,    1
** Section: alu
*Solid Section, elset=Set-1, controls=EC-1, material=alum
,
*End Part
**
**
** ASSEMBLY
**
*Assembly, name=Assembly
**
*Instance, name=bullet-1, part=bullet
       -0.01,           0.,       -0.035
       -0.01,           0.,       -0.035, 1.0,           0.,       -0.035, 90.0
*End Instance
**
*Instance, name=plate-1, part=plate
*End Instance
**
*Nset, nset=Set-1, instance=plate-1
  1,  2,  3,  4,  6,  7
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*Elset, elset=Set-1, instance=plate-1
   7,  18,  24,  28,  29,  36
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*Nset, nset=Set-2, instance=bullet-1
 97,
*Nset, nset=Set-3, instance=bullet-1
 97,
*End Assembly
**
** ELEMENT CONTROLS
**
*Section Controls, name=EC-1, DISTORTION CONTROL=YES
1., 1., 1.
**
** MATERIALS
**
*Material, name=alum
*Density
2800.,
*Elastic
 7e+10, 0.33
*Plastic
 1.6e+8,   0.
 3.4e+8, 0.3
*Damage Initiation, criterion=DUCTILE
 1.0, 0., 30.
 0.7, 0.4, 30.
*Material, name=lead
*Density
11340.,
*Elastic
 1.4e+10, 0.425
**
** INTERACTION PROPERTIES
**
*Surface Interaction, name=IntProp-1
*Friction
 0.25,
**
** BOUNDARY CONDITIONS
**
** Name: BC-1 Type: Symmetry/Antisymmetry/Encastre
*Boundary
Set-1, ENCASTRE
** Name: BC-2 Type: Displacement/Rotation
*Boundary
bullet-1.Set-4, 1, 1
bullet-1.Set-4, 2, 2
bullet-1.Set-4, 4, 4
bullet-1.Set-4, 5, 5
bullet-1.Set-4, 6, 6
**
** PREDEFINED FIELDS
**
** Name: Predefined Field-1   Type: Velocity
*Initial Conditions, type=VELOCITY
bullet-1.Set-4, 3, 500.
**
** INTERACTIONS
**
** Interaction: Int-1
*Contact, op=NEW
*Contact Inclusions, ALL EXTERIOR
*Contact Property Assignment
 ,  , IntProp-1
** ----------------------------------------------------------------
**
** STEP: Step-1
**
*Step, name=Step-1, nlgeom=YES
*Dynamic, Explicit
1e-08, 1e-04
*Bulk Viscosity
0.06, 1.2
**
** OUTPUT REQUESTS
**
*Restart, write, number interval=1, time marks=NO
**
** FIELD OUTPUT: F-Output-1
**
*Output, field
*Node Output
A, RF, U, V
*Element Output, directions=YES
EVF, LE, PE, PEEQ, PEEQVAVG, PEVAVG, S, STATUS, SVAVG
*Contact Output
CSTRESS,
**
** HISTORY OUTPUT: H-Output-1
**
*Output, history, variable=PRESELECT
*End Step
