*Heading
** Job name: COUPING Model name: Model-1
** Generated by: Abaqus/CAE Learning Edition 2023
*Preprint, echo=NO, model=NO, history=NO, contact=NO
**
** PARTS
**
*Part, name=couping
*Node
      1, 0.0335265398, -0.0250000004, 0.0299999993
      2, 0.0252898093, -0.0250000004, 0.0299999993
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*Element, type=C3D8R
 1,  5,  6, 24, 25,  1,  2, 22, 23
 2, 25, 24,  7,  8, 23, 22,  3,  4
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*Nset, nset=Set-1, generate
  1,  56,   1
*Elset, elset=Set-1, generate
  1,  24,   1
** Section: STEEL
*Solid Section, elset=Set-1, material=STEEL
,
*End Part
**
*Part, name=plate
*Node
      1, 0.0700000003, 0.0350000001, 0.0199999996
      2, 0.0700000003, 0.0350000001,           0.
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*Element, type=C3D8R
  1, 110, 589, 706, 277,   1,  13, 269,  22
  2, 589, 150, 433, 706,  13,   2,  14, 269
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*Nset, nset=Set-1, generate
   1,  861,    1
*Elset, elset=Set-1, generate
   1,  480,    1
** Section: ALU
*Solid Section, elset=Set-1, material=ALU
,
*End Part
**
**
** ASSEMBLY
**
*Assembly, name=Assembly
**
*Instance, name=plate-1, part=plate
      -0.001,       -0.005,           0.
*End Instance
**
*Instance, name=couping-1, part=couping
     0.06794,        0.083,           0.
     0.06794,        0.083,           0., -0.509410269189626, 0.660350269189626, -0.577350269189626,         120.
*End Instance
**
*Nset, nset=Set-1, instance=plate-1
   9,  10,  11,  12, 189, 190
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*Elset, elset=Set-1, instance=plate-1, generate
 401,  480,    1
*Nset, nset=Set-4, instance=couping-1, generate
  1,  56,   1
*Elset, elset=Set-4, instance=couping-1, generate
  1,  24,   1
*End Assembly
*Amplitude, name=Amp-1
             0.,              0.,             0.002,              1.
**
** MATERIALS
**
*Material, name=ALU
*Density
2700.,
*Elastic
 7e+10, 0.33
*Plastic
1.6e+8,   0.
3.4e+8, 0.3
*Damage Initiation, criterion=DUCTILE
 1.0, 0., 30.
 0.5, 0.4, 30.
*Material, name=STEEL
*Density
7800.,
*Elastic
 2.1e+11, 0.3
**
** INTERACTION PROPERTIES
**
*Surface Interaction, name=IntProp-1
*Friction
 0.25,
**
** BOUNDARY CONDITIONS
**
** Name: BC-1 Type: Symmetry/Antisymmetry/Encastre
*Boundary
Set-1, ENCASTRE
**
** INTERACTIONS
**
** Interaction: Int-1
*Contact, op=NEW
*Contact Inclusions, ALL EXTERIOR
*Contact Property Assignment
 ,  , IntProp-1
** ----------------------------------------------------------------
**
** STEP: Step-1
**
*Step, name=Step-1, nlgeom=YES
*Dynamic, Explicit
1e-07, 2e-03
*Bulk Viscosity
0.06, 1.2
** Mass Scaling: Semi-Automatic
**               Whole Model
** Fixed Mass Scaling, dt=1e-07, type=below min
**
** BOUNDARY CONDITIONS
**
** Name: BC-2 Type: Displacement/Rotation
*Boundary, amplitude=Amp-1
Set-4, 1, 1, -0.2
Set-4, 2, 2
Set-4, 3, 3
Set-4, 4, 4
Set-4, 5, 5
Set-4, 6, 6
**
** OUTPUT REQUESTS
**
*Restart, write, number interval=1, time marks=NO
**
** FIELD OUTPUT: F-Output-1
**
*Output, field, number interval=100
*Node Output
A, RF, U, V
*Element Output, directions=YES
EVF, LE, PE, PEEQ, PEEQVAVG, PEVAVG, S, STATUS, SVAVG
*Contact Output
CSTRESS,
**
** HISTORY OUTPUT: H-Output-1
**
*Output, history, variable=PRESELECT
*End Step
