*Heading
** Job name: Charpy-Solid Model name: Model-1
** Generated by: Abaqus/CAE Learning Edition 2023
*Preprint, echo=NO, model=NO, history=NO, contact=NO
**
** PARTS
**
*Part, name=PENDULUM
*Node
      1,          -5.,          20.,           0.
      2,         -20.,          20.,           0.
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*Element, type=C3D8R
 1, 16, 15, 11, 12, 34, 33, 29, 30
 2, 12,  6, 14, 16, 30, 24, 32, 34
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*Nset, nset=Set-1, generate
  1,  72,   1
*Elset, elset=Set-1, generate
  1,  33,   1
** Section: STEEL-Elastic
*Solid Section, elset=Set-1, material=STEEL-Elastic
,
*End Part
**
*Part, name=PLATE
*Node
      1,          10.,           0.,          15.
      2,          10.,           5.,          15.
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*Element, type=C3D8R
1, 13, 14, 17, 16,  1,  2,  5,  4
2, 14, 15, 18, 17,  2,  3,  6,  5
3, 16, 17, 20, 19,  4,  5,  8,  7
4, 17, 18, 21, 20,  5,  6,  9,  8
5, 19, 20, 23, 22,  7,  8, 11, 10
6, 20, 21, 24, 23,  8,  9, 12, 11
*Nset, nset=Set-1, generate
  1,  24,   1
*Elset, elset=Set-1, generate
 1,  6,  1
** Section: STEEL-Elastic
*Solid Section, elset=Set-1, material=STEEL-Elastic
,
*End Part
**
*Part, name=SPECIMENT
*Node
      1,         32.5,           5.,          10.
      2,         32.5,           5.,           0.
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*Element, type=C3D8R
 1,  46, 209, 549, 203,   1,  25, 197,  32
 2, 209, 210, 550, 549,  25,  26, 198, 197
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*Nset, nset=Set-1, generate
   1,  770,    1
*Elset, elset=Set-1, generate
   1,  468,    1
** Section: STEEL
*Solid Section, elset=Set-1, material=STEEL
,
*End Part
**
**
** ASSEMBLY
**
*Assembly, name=Assembly
**
*Instance, name=PENDULUM-1, part=PENDULUM
        12.5,     6.669741,         -2.5
*End Instance
**
*Instance, name=SPECIMENT-1, part=SPECIMENT
*End Instance
**
*Instance, name=PLATE-1, part=PLATE
        17.5,          -5.,         -2.5
*End Instance
**
*Instance, name=PLATE-2, part=PLATE
       -42.5,          -5.,         -2.5
*End Instance
**
*Nset, nset=Set-3, instance=PLATE-1, generate
 1,  22,  3
*Elset, elset=Set-3, instance=PLATE-1
 1,
*Nset, nset=Set-4, instance=PLATE-2, generate
 1,  22,  3
*Elset, elset=Set-4, instance=PLATE-2
 1,
*Nset, nset=Set-5, instance=PENDULUM-1, generate
  1,  72,   1
*Elset, elset=Set-5, instance=PENDULUM-1, generate
  1,  33,   1
*Elset, elset=_CP-2-PENDULUM-1_S4, internal, instance=PENDULUM-1
  4,  5, 15, 16, 26, 27
*Elset, elset=_CP-2-PENDULUM-1_S3, internal, instance=PENDULUM-1
  2,  9, 13, 20, 24, 31
*Elset, elset=_CP-2-PENDULUM-1_S5, internal, instance=PENDULUM-1
  1,  3,  6, 11, 12, 14, 17, 22, 23, 25, 28, 33
*Elset, elset=_CP-2-PENDULUM-1_S6, internal, instance=PENDULUM-1, generate
  3,  25,  11
*Surface, type=ELEMENT, name=CP-2-PENDULUM-1
_CP-2-PENDULUM-1_S4, S4
_CP-2-PENDULUM-1_S3, S3
_CP-2-PENDULUM-1_S6, S6
_CP-2-PENDULUM-1_S5, S5
*Elset, elset=_CP-3-PLATE-1_S4, internal, instance=PLATE-1, generate
 2,  6,  2
*Surface, type=ELEMENT, name=CP-3-PLATE-1
_CP-3-PLATE-1_S4, S4
*Elset, elset=_CP-4-PLATE-2_S4, internal, instance=PLATE-2, generate
 2,  6,  2
*Surface, type=ELEMENT, name=CP-4-PLATE-2
_CP-4-PLATE-2_S4, S4
*Elset, elset=_CP-4-SPECIMENT-1_S3, internal, instance=SPECIMENT-1
 357, 358, 361, 362, 365, 366
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*Elset, elset=_CP-4-SPECIMENT-1_S4, internal, instance=SPECIMENT-1, generate
 402,  444,    2
*Elset, elset=_CP-4-SPECIMENT-1_S2, internal, instance=SPECIMENT-1
  33,  34,  35,  36,  37,  38
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*Elset, elset=_CP-4-SPECIMENT-1_S1, internal, instance=SPECIMENT-1
  25,  26,  27,  28,  29,  30,  31,  32, 253, 254, 255, 256, 257, 258, 259, 260
*Surface, type=ELEMENT, name=CP-4-SPECIMENT-1
_CP-4-SPECIMENT-1_S3, S3
_CP-4-SPECIMENT-1_S4, S4
_CP-4-SPECIMENT-1_S2, S2
_CP-4-SPECIMENT-1_S1, S1
*Elset, elset=_CP-5-SPECIMENT-1_S2, internal, instance=SPECIMENT-1
   1,   2,   3,   4,   5,   6
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*Surface, type=ELEMENT, name=CP-5-SPECIMENT-1
_CP-5-SPECIMENT-1_S2, S2
*Elset, elset=_CP-6-SPECIMENT-1_S2, internal, instance=SPECIMENT-1
 217, 218, 221, 222, 229, 230, 231, 232, 233, 234, 235, 236
*Elset, elset=_CP-6-SPECIMENT-1_S3, internal, instance=SPECIMENT-1
 129, 130, 133, 134, 137, 138
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*Elset, elset=_CP-6-SPECIMENT-1_S4, internal, instance=SPECIMENT-1, generate
 174,  216,    2
*Surface, type=ELEMENT, name=CP-6-SPECIMENT-1
_CP-6-SPECIMENT-1_S2, S2
_CP-6-SPECIMENT-1_S3, S3
_CP-6-SPECIMENT-1_S4, S4
*End Assembly
*Amplitude, name=Amp-1
             0.,              0.,              0.001,              1.
**
** MATERIALS
**
*Material, name=STEEL
*Damage Initiation, criterion=DUCTILE
  1.,  0., 30.
 0.5, 0.4, 30.
*Damage Evolution, type=DISPLACEMENT
 0.02,
*Density
 7.8e-09,
*Elastic
210000., 0.3
*Plastic
 755.,   0.
 809., 0.01
 829., 0.02
 842.,  0.1
 895., 0.15
 922.,  0.4
 953.,   1.
1100.,   4.
*Material, name=STEEL-Elastic
*Density
 7.8e-09,
*Elastic
210000., 0.3
**
** INTERACTION PROPERTIES
**
*Surface Interaction, name=IntProp-1
*Friction
 0.2,
*Surface Behavior, pressure-overclosure=HARD
** ----------------------------------------------------------------
**
** STEP: Step-1
**
*Step, name=Step-1, nlgeom=YES
*Dynamic, Explicit
1.0e-07, 0.001
*Bulk Viscosity
0.06, 1.2
** Mass Scaling: Semi-Automatic
**               Whole Model
** Fixed Mass Scaling, dt=0.0001, type=below min
**
** BOUNDARY CONDITIONS
**
** Name: BC-1 Type: Symmetry/Antisymmetry/Encastre
*Boundary
Set-3, ENCASTRE
** Name: BC-2 Type: Symmetry/Antisymmetry/Encastre
*Boundary
Set-4, ENCASTRE
** Name: BC-3 Type: Displacement/Rotation
*Boundary, amplitude=Amp-1
Set-5, 1, 1
Set-5, 2, 2, -30.
Set-5, 3, 3
Set-5, 4, 4
Set-5, 5, 5
Set-5, 6, 6
**
** INTERACTIONS
**
** Interaction: CP-1-SPECIMENT-1-PENDULUM-1
*Contact Pair, interaction=IntProp-1, mechanical constraint=KINEMATIC, cpset=CP-1-SPECIMENT-1-PENDULUM-1
CP-4-SPECIMENT-1, CP-2-PENDULUM-1
** Interaction: CP-2-SPECIMENT-1-PLATE-1
*Contact Pair, interaction=IntProp-1, mechanical constraint=KINEMATIC, cpset=CP-2-SPECIMENT-1-PLATE-1
CP-5-SPECIMENT-1, CP-3-PLATE-1
** Interaction: CP-3-SPECIMENT-1-PLATE-2
*Contact Pair, interaction=IntProp-1, mechanical constraint=KINEMATIC, cpset=CP-3-SPECIMENT-1-PLATE-2
CP-6-SPECIMENT-1, CP-4-PLATE-2
**
** OUTPUT REQUESTS
**
*Restart, write, number interval=1, time marks=NO
**
** FIELD OUTPUT: F-Output-1
**
*Output, field
*Node Output
A, RF, TIEADJUST, TIEDSTATUS, U, V
*Element Output, directions=YES
BURNF, DBURNF, DENSITY, DENSITYVAVG, EACTIVE, EMSF, ESDV, EVF, FV, LE, MFR, PE, PEEQ, PEEQVAVG, PEVAVG, RHOE
RHOP, S, SDV, STATUS, SVAVG, UVARM
*Contact Output
CSTRESS,
**
** HISTORY OUTPUT: H-Output-1
**
*Output, history, variable=PRESELECT
*End Step
