*Heading
** Job name: crash-tube Model name: Model-1
** Generated by: Abaqus/CAE Learning Edition 2023
*Preprint, echo=NO, model=NO, history=NO, contact=NO
**
** PARTS
**
*Part, name=SquareTube
*Node
1,   -3.729289e+01,   3.729289e+01,   3.500000e+02
2,   -3.166667e+01,   3.700000e+01,   3.500000e+02
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*Element, type=C3D8R
1, 1, 2, 3, 4, 5, 6, 7, 8
2, 2, 9, 10, 3, 6, 11, 12, 7
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*Nset, nset=Set-1, generate
   1,  5664,    1
*Elset, elset=Set-1, generate
   1,  2784,    1
** Section: Tube
*Solid Section, elset=Set-1, material=Aluminum
,
*End Part
**
*Part, name=TopPlate
*Node
      1,          75.,         -75.,          10.
      2,          60.,         -75.,          10.
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*Element, type=C3D8R
  1,  23,  24,  35,  34,   1,   2,  13,  12
  2,  24,  25,  36,  35,   2,   3,  14,  13
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*Nset, nset=Set-1, generate
  1,  242,   1
*Elset, elset=Set-1, generate
  1,  100,   1
** Section: Plate
*Solid Section, elset=Set-1, material=STEEL
,
*End Part
**
**
** ASSEMBLY
**
*Assembly, name=Assembly
**
*Instance, name=SquareTube-1, part=SquareTube
*End Instance
**
*Instance, name=TopPlate-1, part=TopPlate
          0.,           0.,         -10.
*End Instance
**
*Nset, nset=Set-2, instance=SquareTube-1
1, 2, 5, 6, 9, 11
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*Nset, nset=Set-3, instance=TopPlate-1, generate
  1,  242,   1
*Elset, elset=Set-3, instance=TopPlate-1, generate
  1,  100,   1
*End Assembly
*Amplitude, name=Amp-1
             0.,              0.,            0.01,              1.
**
** MATERIALS
**
*Material, name=Aluminum
*Density
 2.7e-09,
*Elastic
68210., 0.3
*Plastic
 80.,    0.
115., 0.024
139., 0.049
150., 0.074
158., 0.099
167., 0.124
171., 0.149
173., 0.174
*Material, name=STEEL
*Density
 7.8e-09,
*Elastic
210000., 0.3
**
** INTERACTION PROPERTIES
**
*Surface Interaction, name=IntProp-1
*Friction
 0.2,
**
** BOUNDARY CONDITIONS
**
** Name: BC-1 Type: Symmetry/Antisymmetry/Encastre
*Boundary
Set-2, ENCASTRE
** ----------------------------------------------------------------
**
** STEP: Crash
**
*Step, name=Crash, nlgeom=YES
*Dynamic, Explicit
2.5e-07, 0.01
*Bulk Viscosity
0.06, 1.2
**
** BOUNDARY CONDITIONS
**
** Name: BC-2 Type: Displacement/Rotation
*Boundary, amplitude=Amp-1
Set-3, 1, 1
Set-3, 2, 2
Set-3, 3, 3, 300.
Set-3, 4, 4
Set-3, 5, 5
Set-3, 6, 6
**
** INTERACTIONS
**
** Interaction: Int-1
*Contact, op=NEW
*Contact Inclusions, ALL EXTERIOR, HAKAIoption=self-contact
*Contact Property Assignment
 ,  , IntProp-1
**
** OUTPUT REQUESTS
**
*Restart, write, number interval=1, time marks=NO
**
** FIELD OUTPUT: F-Output-1
**
*Output, field, variable=PRESELECT
**
** HISTORY OUTPUT: H-Output-1
**
*Output, history, variable=PRESELECT
*End Step
