*Heading
** Job name: projectile-impact Model name: Model-1
** Generated by: Abaqus/CAE Learning Edition 2023
** Example for HAKAI-v0.0.0, length unit [M]
*Preprint, echo=NO, model=NO, history=NO, contact=NO
**
** PARTS
**
*Part, name=projectile
*Node
1, -7.071068e-04, -7.071068e-04, 0.000000e+00
2, 6.123234e-20, -1.000000e-03, 0.000000e+00
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*Element, type=C3D8R
1, 10, 1, 4, 13, 11, 2, 5, 14
2, 11, 2, 5, 14, 12, 3, 6, 15
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*Nset, nset=Set-4, generate
  1,  99,   1
*Elset, elset=Set-4, generate
  1,  40,   1
** Section:
*Solid Section, elset=Set-4, material=steel
,
*End Part
**
*Part, name=plate
*Node
1, -5.000000e-03, -5.000000e-03, 0.000000e+00
2, -5.000000e-03, -5.000000e-03, 1.000000e-03
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*Element, type=C3D8R
1, 1, 45, 49, 5, 2, 46, 50, 6
2, 2, 46, 50, 6, 3, 47, 51, 7
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*Nset, nset=Set-1, generate
   1,  484,    1
*Elset, elset=Set-1, generate
   1,  300,    1
** Section: alu
*Solid Section, elset=Set-1, controls=EC-1, material=steel
,
*End Part
**
**
** ASSEMBLY
**
*Assembly, name=Assembly
**
*Instance, name=projectile-1, part=projectile
       -0.0001,    0.0001,       0.0034
       0.0,          0.0,          0.0,         0.01,          0.0,          0.0,        20.0
*End Instance
**
*Instance, name=plate-1, part=plate
*End Instance
**
*Nset, nset=Set-1, instance=plate-1
1, 2, 3, 4, 5, 6
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*Nset, nset=Set-2, instance=projectile-1
 97,
*Nset, nset=Set-3, instance=projectile-1
 97,
*End Assembly
**
** ELEMENT CONTROLS
**
*Section Controls, name=EC-1, DISTORTION CONTROL=YES
1., 1., 1.
**
** MATERIALS
**
*Material, name=steel
*Density
7800.,
*Elastic
2.10E+11,	0.3
*Plastic
8.15E+08,	0.00E+00,
8.55E+08,	1.00E-02,
8.88E+08,	2.00E-02,
9.17E+08,	3.00E-02,
9.87E+08,	6.00E-02,
1.06E+09,	1.00E-01,
1.13E+09,	1.50E-01,
1.23E+09,	2.50E-01,
1.33E+09,	4.00E-01,
1.81E+09,	2.00E+00
*Damage Initiation, criterion=DUCTILE
2.31E+00,	-3.33,		0.001
2.31E+00,	-0.333,		0.001
2.18E+00,	-0.267,		0.001
2.06E+00,	-0.2,		0.001
1.95E+00,	-0.133,		0.001
1.85E+00,	-0.0667,	0.001
1.76E+00,	0.,		0.001
1.67E+00,	0.0667,		0.001
1.59E+00,	0.133,		0.001
1.52E+00,	0.2,		0.001
1.46E+00,	0.267,		0.001
1.40E+00,	0.333,		0.001
1.35E+00,	0.4,		0.001
1.30E+00,	0.467,		0.001
1.26E+00,	0.533,		0.001
1.23E+00,	0.6,		0.001
1.20E+00,	0.667,		0.001
1.15E+00,	0.730,		0.001
1.06E+00,	0.851,		0.001
9.45E-01,	1.02,		0.001
8.16E-01,	1.24,		0.001
6.85E-01,	1.51,		0.001
2.02E-01,	3.33,		0.001
**
** INTERACTION PROPERTIES
**
*Surface Interaction, name=IntProp-1
*Friction
 0.25,
**
** BOUNDARY CONDITIONS
**
** Name: BC-1 Type: Symmetry/Antisymmetry/Encastre
*Boundary
Set-1, ENCASTRE
** Name: BC-2 Type: Displacement/Rotation
*Boundary
projectile-1.Set-4, 1, 1
projectile-1.Set-4, 4, 4
projectile-1.Set-4, 5, 5
projectile-1.Set-4, 6, 6
**
** PREDEFINED FIELDS
**
** Name: Predefined Field-1   Type: Velocity
*Initial Conditions, type=VELOCITY
projectile-1.Set-4, 3, -1.8794e+03
*Initial Conditions, type=VELOCITY
projectile-1.Set-4, 2, 6.8404e+02
**
** INTERACTIONS
**
** Interaction: Int-1
*Contact, op=NEW
*Contact Inclusions, ALL EXTERIOR
*Contact Property Assignment
 ,  , IntProp-1
** ----------------------------------------------------------------
**
** STEP: Step-1
**
*Step, name=Step-1, nlgeom=YES
*Dynamic, Explicit
1e-10, 6e-06
*Bulk Viscosity
0.06, 1.2
**
** OUTPUT REQUESTS
**
*Restart, write, number interval=1, time marks=NO
**
** FIELD OUTPUT: F-Output-1
**
*Output, field
*Node Output
A, RF, U, V
*Element Output, directions=YES
EVF, LE, PE, PEEQ, PEEQVAVG, PEVAVG, S, STATUS, SVAVG
*Contact Output
CSTRESS,
**
** HISTORY OUTPUT: H-Output-1
**
*Output, history, variable=PRESELECT
*End Step
